! --- Curvas Padrão para Simulação FV ---
New XYCurve.MyPvsT npts=4 xarray=[0 25 75 100] yarray=[1.2 1.0 0.8 0.6]
New XYCurve.MyEff npts=4 xarray=[0.1 0.2 0.4 1.0] yarray=[0.86 0.9 0.93 0.97]
New Loadshape.MyIrrad npts=96 minterval=15 mult=(0, 0, 0, 0, 0, 0, 0, 0, 0, 0, 0, 0, 0, 0, 0, 0, 0, 0, 0, 0, 0, 0, 0, 0, 0.1, 0.1, 0.1, 0.1, 0.2, 0.2, 0.2, 0.2, 0.3, 0.3, 0.3, 0.3, 0.5, 0.5, 0.5, 0.5, 0.8, 0.8, 0.8, 0.8, 0.9, 0.9, 0.9, 0.9, 1.0, 1.0, 1.0, 1.0, 1.0, 1.0, 1.0, 1.0, 0.99, 0.99, 0.99, 0.99, 0.9, 0.9, 0.9, 0.9, 0.7, 0.7, 0.7, 0.7, 0.4, 0.4, 0.4, 0.4, 0.1, 0.1, 0.1, 0.1, 0, 0, 0, 0, 0, 0, 0, 0, 0, 0, 0, 0, 0, 0, 0, 0, 0, 0, 0, 0)
New Tshape.MyTemp npts=96 minterval=15 temp=(25, 25, 25, 25, 25, 25, 25, 25, 25, 25, 25, 25, 25, 25, 25, 25, 25, 25, 25, 25, 25, 25, 25, 25, 25, 25, 25, 25, 25, 25, 25, 25, 35, 35, 35, 35, 40, 40, 40, 40, 45, 45, 45, 45, 50, 50, 50, 50, 60, 60, 60, 60, 60, 60, 60, 60, 55, 55, 55, 55, 40, 40, 40, 40, 35, 35, 35, 35, 30, 30, 30, 30, 25, 25, 25, 25, 25, 25, 25, 25, 25, 25, 25, 25, 25, 25, 25, 25, 25, 25, 25, 25, 25, 25, 25, 25)
